*Heading
** Job name: checker_test Model name: checker_test
** Generated by: Abaqus/CAE 2019
*Preprint, echo=NO, model=NO, history=NO, contact=NO
**
** PARTS
**
*Part, name=calcite
*Node
      1,         -0.5,         -0.5,           1.
      2,         -0.5, -0.400000006,           1.
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*Element, type=C3D8T
   1,  122,  123,  134,  133,    1,    2,   13,   12
   2,  123,  124,  135,  134,    2,    3,   14,   13
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*Nset, nset=_PickedSet4, internal, generate
    1,  1331,     1
*Elset, elset=_PickedSet4, internal, generate
    1,  1000,     1
*Nset, nset=a_out_nodes
    1,    2,    3,    4,    5,    6
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** Section: feldspar
*Solid Section, elset=_PickedSet4, material=feldspar
,
*End Part
**
**
** ASSEMBLY
**
*Assembly, name=Assembly
**
*Instance, name=calcite-1, part=calcite
          0.,           0.,         -0.5
*End Instance
**
*Nset, nset=_PickedSet150, internal, instance=calcite-1, generate
   11,  1331,    11
*Elset, elset=_PickedSet150, internal, instance=calcite-1, generate
   10,  1000,    10
*Nset, nset=_PickedSet151, internal, instance=calcite-1, generate
    1,  1331,     1
*Elset, elset=_PickedSet151, internal, instance=calcite-1, generate
    1,  1000,     1
*End Assembly
**
** MATERIALS
**
*Material, name=feldspar
*Conductivity
 1.46e-12,
*Density
 2.703e-09,
*Depvar
      1,
*Elastic
87020., 0.29
*Expansion
  3.6e-06,    25.
  4.6e-06, 119.85
 5.19e-06, 219.85
 5.59e-06, 319.85
 5.89e-06, 419.85
 6.14e-06, 519.85
 6.37e-06, 619.85
 6.58e-06, 719.85
 6.78e-06, 819.85
 6.97e-06, 919.85
 7.12e-06,  1000.
*Specific Heat
 860., 50.
 945.,200.
1054.,400.
1090.,500.
*Material, name=quartz
*Conductivity
   8e-06,  1.
 6.5e-06,100.
 5.5e-06,200.
 4.5e-06,300.
   4e-06,400.
 3.8e-06,500.
 3.7e-06,550.
 3.5e-06,575.
 3.5e-06,580.
 3.8e-06,600.
 3.9e-06,700.
   4e-06,800.
*Density
 2.65e-09,
*Elastic
100000.,  0.09,    0.
 95000., 0.085,  100.
 90000.,  0.08,  200.
 85000.,  0.05,  300.
 83000.,    0.,  400.
 80000., -0.05,  500.
 75000.,  -0.1,  550.
 60000.,  -0.2,  575.
 80000.,  -0.3,  580.
 95000.,   0.2,  600.
100000.,  0.25,  700.
105000.,  0.25,  800.
*Expansion
    1e-05,  1.
 1.25e-05,100.
 1.26e-05,200.
 1.27e-05,300.
 1.28e-05,400.
  1.5e-05,500.
 1.75e-05,550.
    2e-05,575.
  2.5e-05,580.
 2.25e-05,600.
  2.1e-05,700.
    2e-05,800.
*Specific Heat
 700.,  1.
 810.,100.
 910.,200.
1005.,300.
1100.,400.
1190.,500.
1250.,550.
1400.,575.
1050.,580.
1070.,600.
1080.,700.
1090.,800.
**
** BOUNDARY CONDITIONS
**
** Name: BC-2 Type: Symmetry/Antisymmetry/Encastre
*Boundary
_PickedSet150, ENCASTRE
** ----------------------------------------------------------------
**
** STEP: heat_up
**
*Step, name=heat_up, nlgeom=NO, inc=150
*Coupled Temperature-displacement, creep=none, deltmx=100.
0.2, 0.2, 0.2, 0.2
**
** LOADS
**
** Name: dflux   Type: Body heat flux
*Dflux
_PickedSet151, BFNU, 0.01
**
** OUTPUT REQUESTS
**
*Restart, write, frequency=0
**
** FIELD OUTPUT: F-Output-1
**
*Output, field, variable=PRESELECT
**
** HISTORY OUTPUT: H-Output-1
**
*Output, history, variable=PRESELECT
*End Step
