*Heading
** Job name: dflux_experiment Model name: square-3d
** Generated by: Abaqus/CAE 2019
*Preprint, echo=NO, model=NO, history=NO, contact=NO
**
** PARTS
**
*Part, name=merged
*Node
      1, 0.0299999993, 0.00499999989, 0.0250000004
      2, 0.00499999989, 0.00499999989, 0.0250000004
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*Element, type=C3D4T
   1, 1210, 1211, 1212, 1213
   2, 1210, 1214, 1211, 1213
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*Nset, nset=_PickedSet6_#2, internal, generate
    1,  3266,     1
*Elset, elset=_PickedSet6_#2, internal, generate
     1,  16903,      1
*Nset, nset=refined_edge
   4,   6,   7,   8,  10,  11
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*Elset, elset=refined_edge
  3213,  3277,  3341,  3348,  3845,  3895
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*Nset, nset="Edge Seeds-1"
   1,   2,   3,   4,   5,   6
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*Elset, elset="Edge Seeds-1"
   192,   214,   291,   343,   408,   702
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*Nset, nset=cube
   1,   2,   3,   4,   5,   6
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*Elset, elset=cube
   192,   214,   291,   343,   408,   702
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** Section: fledspar
*Solid Section, elset=_PickedSet6_#2, material=fledspar
1.,
*End Part
**
**
** ASSEMBLY
**
*Assembly, name=Assembly
**
*Instance, name=merged-1, part=merged
*End Instance
**
*Nset, nset=_PickedSet64, internal, instance=merged-1
    1,    2,    3,    4,    5,    6
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*Elset, elset=_PickedSet64, internal, instance=merged-1, generate
    1,  8056,     1
*Nset, nset=_PickedSet65, internal, instance=merged-1
   13,   14,   15,   17,   18,   19
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*Elset, elset=_PickedSet65, internal, instance=merged-1
  8136,  8148,  8193,  8265,  8430,  8468
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*Nset, nset=_PickedSet66, internal, instance=merged-1
   1,   4,   8,   9,  10,  11
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*Elset, elset=_PickedSet66, internal, instance=merged-1
   114,   178,   184,   343,   360,   382
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*Nset, nset=_PickedSet67, internal, instance=merged-1
    5,    6,    7,    9,   10,   11
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*Elset, elset=_PickedSet67, internal, instance=merged-1
    45,   408,   495,   544,   807,  1084
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*Nset, nset=_PickedSet68, internal, instance=merged-1
    3,    4,    6,    7,    8,    9
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*Elset, elset=_PickedSet68, internal, instance=merged-1
    29,    72,   166,   192,   652,  1152
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*Nset, nset=_PickedSet69, internal, instance=merged-1, generate
    1,  3266,     1
*Elset, elset=_PickedSet69, internal, instance=merged-1, generate
     1,  16903,      1
*End Assembly
**
** MATERIALS
**
*Material, name=fledspar
*Conductivity
 1.46,
*Density
 2.703e-09,
*Elastic
87020., 0.29
*Expansion
  3.6e-06,    25.
  4.6e-06, 119.85
 5.19e-06, 219.85
 5.59e-06, 319.85
 5.89e-06, 419.85
 6.14e-06, 519.85
 6.37e-06, 619.85
 6.58e-06, 719.85
 6.78e-06, 819.85
 6.97e-06, 919.85
 7.12e-06,  1000.
*Specific Heat
 860., 50.
 945.,200.
1054.,400.
1090.,500.
1100.,600.
*Material, name=quartz
*Conductivity
  8.,  0.
 6.5,100.
 5.5,200.
 4.5,300.
  4.,400.
 3.8,500.
 3.7,550.
 3.5,575.
 3.5,580.
 3.8,600.
 3.9,700.
  4.,800.
*Density
 2.65e-09,
*Elastic
100000.,  0.09,    0.
 95000., 0.085,  100.
 90000.,  0.08,  200.
 85000.,  0.05,  300.
 83000.,    0.,  400.
 80000., -0.05,  500.
 75000.,  -0.1,  550.
 60000.,  -0.2,  575.
 80000.,  -0.3,  580.
 95000.,   0.2,  600.
100000.,  0.25,  700.
105000.,  0.25,  800.
*Expansion
    1e-05,  0.
 1.25e-05,100.
 1.26e-05,200.
 1.27e-05,300.
 1.28e-05,400.
  1.5e-05,500.
 1.75e-05,550.
    2e-05,575.
  2.5e-05,580.
 2.25e-05,600.
  2.1e-05,700.
    2e-05,800.
*Specific Heat
 700.,  0.
 810.,100.
 910.,200.
1005.,300.
1100.,400.
1190.,500.
1250.,550.
1400.,575.
1050.,580.
1070.,600.
1080.,700.
1090.,800.
**
** BOUNDARY CONDITIONS
**
** Name: BC-1 Type: Symmetry/Antisymmetry/Encastre
*Boundary
_PickedSet65, ENCASTRE
** Name: x Type: Symmetry/Antisymmetry/Encastre
*Boundary
_PickedSet66, XSYMM
** Name: y Type: Symmetry/Antisymmetry/Encastre
*Boundary
_PickedSet67, YSYMM
** Name: z Type: Symmetry/Antisymmetry/Encastre
*Boundary
_PickedSet68, ZSYMM
**
** PREDEFINED FIELDS
**
** Name: initial_temp   Type: Temperature
*Initial Conditions, type=TEMPERATURE
_PickedSet69, 20.
** ----------------------------------------------------------------
**
** STEP: heat_up
**
*Step, name=heat_up, nlgeom=NO
*Coupled Temperature-displacement, creep=none
0.2, 1.,
**
** LOADS
**
** Name: Load-1   Type: Body heat flux
*Dflux
_PickedSet64, BFNU, 100000.
**
** OUTPUT REQUESTS
**
*Restart, write, frequency=0
**
** FIELD OUTPUT: F-Output-1
**
*Output, field
*Node Output
CF, NT, RF, RFL, U
*Element Output, directions=YES
HFL, LE, MISES, PE, PEEQ, PEMAG, S
*Contact Output
CDISP, CSTRESS
**
** HISTORY OUTPUT: H-Output-1
**
*Output, history, variable=PRESELECT
*End Step
