*Heading
** Job name: umat_test Model name: test_cons_model
** Generated by: Abaqus/CAE 2019
*Preprint, echo=NO, model=NO, history=NO, contact=NO
**
** PARTS
**
*Part, name=cube
*Node
      1,          -5.,          -5.,          20.
      2,          -5.,          -3.,          20.
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*Element, type=C3D8R
  1,  67,  68,  74,  73,   1,   2,   8,   7
  2,  68,  69,  75,  74,   2,   3,   9,   8
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*Nset, nset=_PickedSet5, internal, generate
   1,  396,    1
*Elset, elset=_PickedSet5, internal, generate
   1,  250,    1
** Section: umat
*Solid Section, elset=_PickedSet5, material=umat
,
*End Part
**
**
** ASSEMBLY
**
*Assembly, name=Assembly
**
*Instance, name=cube-1, part=cube
*End Instance
**
*Nset, nset=_PickedSet4, internal, instance=cube-1
   1,   2,   3,   4,   5,   6
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*Elset, elset=_PickedSet4, internal, instance=cube-1
   1,   2,   3,   4,   5,  51
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*Elset, elset=__PickedSurf6_S5, internal, instance=cube-1
  46,  47,  48,  49,  50,  96
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*Surface, type=ELEMENT, name=_PickedSurf6, internal
__PickedSurf6_S5, S5
*End Assembly
**
** MATERIALS
**
*Material, name=feldspar
*Conductivity
 1.46,
*Density
 2.703e-09,
*Elastic
87020., 0.29
*Expansion
  3.6e-06,    25.
  4.6e-06, 119.85
 5.19e-06, 219.85
 5.59e-06, 319.85
 5.89e-06, 419.85
 6.14e-06, 519.85
 6.37e-06, 619.85
 6.58e-06, 719.85
 6.78e-06, 819.85
 6.97e-06, 919.85
 7.12e-06,  1000.
*Specific Heat
 860., 50.
 945.,200.
1054.,400.
1090.,500.
*Material, name=feldspar_morh_coulomb
*Conductivity
 1.46,
*Density
 2.703e-09,
*Elastic
87020., 0.29
*Expansion
  3.6e-06,    25.
  4.6e-06, 119.85
 5.19e-06, 219.85
 5.59e-06, 319.85
 5.89e-06, 419.85
 6.14e-06, 519.85
 6.37e-06, 619.85
 6.58e-06, 719.85
 6.78e-06, 819.85
 6.97e-06, 919.85
 7.12e-06,  1000.
*Specific Heat
 860., 50.
 945.,200.
1054.,400.
1090.,500.
*Mohr Coulomb
 43.53,46.
*Mohr Coulomb Hardening
100.,0.
100.,1.
*Material, name=umat
*Density
7850.,
*User Material, constants=2
 2.1e+11, 0.3
**
** BOUNDARY CONDITIONS
**
** Name: BC-1 Type: Symmetry/Antisymmetry/Encastre
*Boundary
_PickedSet4, ENCASTRE
** ----------------------------------------------------------------
**
** STEP: Step-1
**
*Step, name=Step-1, nlgeom=NO
*Static
1., 1., 1e-05, 1.
**
** LOADS
**
** Name: pressure   Type: Pressure
*Dsload
_PickedSurf6, P, 10.
**
** OUTPUT REQUESTS
**
*Restart, write, frequency=0
**
** FIELD OUTPUT: F-Output-1
**
*Output, field, variable=PRESELECT
**
** HISTORY OUTPUT: H-Output-1
**
*Output, history, variable=PRESELECT
*End Step
