*Heading
** Job name: TMS Model name: Model-1
** Generated by: Abaqus/CAE 2019
*Preprint, echo=NO, model=YES, history=NO, contact=NO
**
** PARTS
**
*Part, name=Part-1
*End Part
**
**
** ASSEMBLY
**
*Assembly, name=Assembly
**
*Instance, name=Part-1-1, part=Part-1
*Node
      1,       -2000.,       -1000.,           0.
      2,       -1900.,       -1000.,           0.
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*Element, type=S8R5
  1,    1,    2,   43,   42,  862,  863,  864,  865
  2,    2,    3,   44,   43,  866,  867,  868,  863
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*Nset, nset=_PickedSet2, internal, generate
    1,  2521,     1
*Elset, elset=_PickedSet2, internal, generate
   1,  800,    1
** Section: Section-1
*Shell Section, elset=_PickedSet2, material=unidirectional-user
25., 3
*End Instance
**
*Nset, nset=_PickedSet11, internal, instance=Part-1-1
    1,   41,   42,   82,   83,  123
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*Elset, elset=_PickedSet11, internal, instance=Part-1-1
   1,  40,  41,  80,  81, 120
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*Nset, nset=_PickedSet12, internal, instance=Part-1-1
    1,    2,    3,    4,    5,    6
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*Elset, elset=_PickedSet12, internal, instance=Part-1-1
   1,   2,   3,   4,   5,   6
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*Elset, elset=__PickedSurf4_SPOS, internal, instance=Part-1-1, generate
   1,  800,    1
*Surface, type=ELEMENT, name=_PickedSurf4, internal
__PickedSurf4_SPOS, SPOS
*End Assembly
**
** MATERIALS
**
** This works with Abaqus intrinsic failure criteria for composites such as max.
** stress and so on
*Material, name=unidirectional
*Elastic, type=LAMINA
133860., 7706., 0.301, 4306., 4306., 2760.
*Fail Stress
1830.,-1096.,   57., -228.,   71.,   -1.,    0.
** 11 properties for Tsai-Wu, some redundant for max. stress and TMS.
** Note: umatTM.for requires 4 state variables, umars8r5.for (Ex 3.13) uses only
** 2 of those. ok.
*Material, name=unidirectional-user
*Transverse Shear
35883., 23000., 0.
*Depvar
      4,
*User Material, constants=11
133860., 7706., 0.301, 4306., 2760., 1830., 1096.,   57.
  228.,   71.,   -1.
**
** BOUNDARY CONDITIONS
**
** Name: BC-1 Type: Displacement/Rotation
*Boundary
_PickedSet11, 2, 2
_PickedSet11, 3, 3
** Name: BC-2 Type: Displacement/Rotation
*Boundary
_PickedSet12, 1, 1
_PickedSet12, 3, 3
** ----------------------------------------------------------------
**
** STEP: Step-1
**
*Step, name=Step-1, nlgeom=NO
*Static
1., 1., 1e-05, 1.
**
** LOADS
**
** Name: Load-1   Type: Pressure
*Dsload
_PickedSurf4, P, 0.03
**
** OUTPUT REQUESTS
**
*Restart, write, frequency=0
*Print, solve=NO
**
** FIELD OUTPUT: F-Output-1
**
*Output, field
*Node Output
RF, U
*Element Output, directions=YES
CFAILURE, LE, S, SDV
**
** HISTORY OUTPUT: H-Output-1
**
*Output, history, variable=PRESELECT
*End Step
